// SBML level 2 version 4

model Hailstone()
  // Hailstone

  // Compartments:
  compartment HailstoneCompartment = 1;

  // Species:
  species X1 in HailstoneCompartment = 50;
  species PO in HailstoneCompartment = 0;
  species H in HailstoneCompartment = 0;
  species M in HailstoneCompartment = 0;
  species PE in HailstoneCompartment = 0;
  species D in HailstoneCompartment = 0;
  species B in HailstoneCompartment = 0;
  species A in HailstoneCompartment = 0;
  species CE in HailstoneCompartment = 0;
  species Y in HailstoneCompartment = 0;
  species CO in HailstoneCompartment = 0;

  // Reactions:
  Reaction1: X1 => PO + H + M; Reaction1_kf*X1;
    Reaction1_kf = 1;
  Reaction2: PO + PO => PE; Reaction2_kf*PO*PO;
    Reaction2_kf = 1;
  Reaction3: PE + PO => PO; Reaction3_kf*PE*PO;
    Reaction3_kf = 1;
  Reaction4: PE + PE => PE; Reaction4_kf*PE*PE;
    Reaction4_kf = 1;
  Reaction5: H + H => D; Reaction5_kf*H*H;
    Reaction5_kf = 1;
  Reaction6: M => B + B + B + A + A + A + A + A + A; Reaction6_kf*M;
    Reaction6_kf = 1;
  Reaction7: B + B + A + A + A => ; Reaction7_kf*B*B*A*A*A;
    Reaction7_kf = 1;
  Reaction8: PE + D => PE + CE + Y; Reaction8_kf*PE*D;
    Reaction8_kf = 1;
  Reaction9: PO + A => PO + CO + Y; Reaction9_kf*PO*A;
    Reaction9_kf = 1;
  Reaction10: CE + PO + Y => PO + D; Reaction10_kf*CE*PO*Y;
    Reaction10_kf = 1;
  Reaction11: CO + PE + Y => PE + A; Reaction11_kf*CO*PE*Y;
    Reaction11_kf = 1;
end
